! Script for LinecodesKahala_1_4kv.dss

! LINECODES
New linecode.lc1 nphases=1 r1=0.005 x1=0.374 r0=0.005 x0=0.374 b0=7.212 b1=7.212 units=MI

New linecode.lc2 nphases=3 r1=0.001 x1=0.208 r0=0.014 x0=0.704 b0=6.053 b1=7.791 units=MI

New linecode.lc3 nphases=3 r1=0.000 x1=0.169 r0=0.009 x0=0.587 b0=3.893 b1=9.118 units=MI

New linecode.lc4 nphases=3 r1=0.003 x1=0.308 r0=0.003 x0=0.308 b0=7.396 b1=7.396 units=MI

New linecode.lc5 nphases=1 r1=0.003 x1=0.308 r0=0.003 x0=0.308 b0=7.377 b1=7.377 units=MI

New linecode.lc6 nphases=3 r1=0.000 x1=0.169 r0=0.009 x0=0.587 b0=3.950 b1=9.119 units=MI

New linecode.lc7 nphases=3 r1=0.305 x1=0.637 r0=0.635 x0=1.729 b0=3.237 b1=6.786 units=MI

New linecode.lc8 nphases=1 r1=1.193 x1=1.186 r0=1.193 x0=1.186 b0=5.043 b1=5.043 units=MI

New linecode.lc9 nphases=3 r1=1.503 x1=0.777 r0=2.241 x0=2.432 b0=2.807 b1=5.481 units=MI

New linecode.lc10 nphases=1 r1=1.749 x1=1.329 r0=1.749 x0=1.329 b0=4.590 b1=4.590 units=MI

New linecode.lc11 nphases=2 r1=1.503 x1=0.777 r0=2.241 x0=2.432 b0=2.807 b1=5.481 units=MI

New linecode.lc12 nphases=3 r1=0.970 x1=0.714 r0=1.638 x0=2.130 b0=3.002 b1=6.063 units=MI

New linecode.lc13 nphases=2 r1=2.390 x1=0.805 r0=3.124 x0=2.718 b0=2.739 b1=5.283 units=MI

New linecode.lc14 nphases=1 r1=2.635 x1=1.443 r0=2.635 x0=1.443 b0=4.435 b1=4.435 units=MI

New linecode.lc15 nphases=3 r1=2.390 x1=0.805 r0=3.124 x0=2.718 b0=2.739 b1=5.283 units=MI

New linecode.lc16 nphases=1 r1=0.415 x1=1.001 r0=0.415 x0=1.001 b0=5.603 b1=5.603 units=MI

New linecode.lc17 nphases=2 r1=0.970 x1=0.714 r0=1.638 x0=2.130 b0=3.002 b1=6.063 units=MI

New linecode.lc18 nphases=3 r1=0.602 x1=0.676 r0=1.127 x0=1.904 b0=3.120 b1=6.421 units=MI

New linecode.lc19 nphases=1 r1=0.778 x1=1.131 r0=0.778 x0=1.131 b0=5.043 b1=5.043 units=MI

New linecode.lc20 nphases=1 r1=1.160 x1=1.221 r0=1.160 x0=1.221 b0=4.760 b1=4.760 units=MI

New linecode.lc21 nphases=3 r1=0.945 x1=0.749 r0=1.589 x0=2.165 b0=2.881 b1=5.699 units=MI

New linecode.lc22 nphases=3 r1=0.000 x1=0.208 r0=0.010 x0=0.534 b0=3.873 b1=7.698 units=MI

New linecode.lc23 nphases=3 r1=1.769 x1=0.269 r0=4.256 x0=0.977 b0=-0.000 b1=101.516 units=MI

New linecode.lc24 nphases=3 r1=0.945 x1=0.749 r0=1.589 x0=2.165 b0=2.838 b1=5.699 units=MI

New linecode.lc25 nphases=3 r1=0.109 x1=0.172 r0=0.924 x0=0.172 b0=-0.000 b1=205.023 units=MI

New linecode.lc26 nphases=1 r1=1.160 x1=1.221 r0=1.160 x0=1.221 b0=4.745 b1=4.745 units=MI

New linecode.lc27 nphases=3 r1=0.560 x1=0.227 r0=2.450 x0=1.230 b0=-0.000 b1=153.270 units=MI

New linecode.lc28 nphases=1 r1=2.733 x1=0.311 r0=2.733 x0=0.311 b0=69.004 b1=69.004 units=MI

New linecode.lc29 nphases=3 r1=0.003 x1=0.308 r0=0.003 x0=0.308 b0=7.377 b1=7.377 units=MI

New linecode.lc30 nphases=1 r1=2.598 x1=0.505 r0=2.598 x0=0.505 b0=67.677 b1=67.677 units=MI

New linecode.lc31 nphases=1 r1=2.733 x1=0.311 r0=2.733 x0=0.311 b0=69.004 b1=69.004 units=MI

New linecode.lc32 nphases=3 r1=1.708 x1=0.311 r0=4.785 x0=0.311 b0=-0.000 b1=103.507 units=MI

New linecode.lc33 nphases=3 r1=0.303 x1=0.671 r0=0.623 x0=1.790 b0=3.088 b1=6.469 units=MI

New linecode.lc34 nphases=3 r1=0.107 x1=0.184 r0=1.760 x0=0.184 b0=0.000 b1=386.160 units=MI

New linecode.lc35 nphases=3 r1=0.243 x1=0.195 r0=1.452 x0=0.338 b0=0.000 b1=203.032 units=MI

New linecode.lc36 nphases=3 r1=0.210 x1=0.200 r0=2.529 x0=0.200 b0=-0.000 b1=288.624 units=MI

New linecode.lc37 nphases=2 r1=0.210 x1=0.200 r0=2.529 x0=0.200 b0=-0.000 b1=288.624 units=MI

New linecode.lc38 nphases=3 r1=0.148 x1=0.179 r0=0.470 x0=0.180 b0=0.000 b1=208.805 units=MI

New linecode.lc39 nphases=3 r1=0.303 x1=0.671 r0=0.623 x0=1.790 b0=3.088 b1=6.469 units=MI

New linecode.lc40 nphases=1 r1=0.410 x1=1.044 r0=0.410 x0=1.044 b0=5.342 b1=5.342 units=MI

New linecode.lc41 nphases=2 r1=1.708 x1=0.311 r0=4.785 x0=0.311 b0=-0.000 b1=103.507 units=MI

New linecode.lc42 nphases=1 r1=1.190 x1=0.561 r0=1.190 x0=0.561 b0=102.180 b1=102.180 units=MI

New linecode.lc43 nphases=1 r1=0.670 x1=0.417 r0=0.670 x0=0.417 b0=64.095 b1=64.095 units=MI

New linecode.lc44 nphases=2 r1=0.945 x1=0.749 r0=1.589 x0=2.165 b0=2.838 b1=5.699 units=MI

New linecode.lc45 nphases=1 r1=0.983 x1=0.200 r0=0.983 x0=0.200 b0=192.416 b1=192.416 units=MI

New linecode.lc46 nphases=3 r1=0.243 x1=0.195 r0=1.452 x0=0.338 b0=0.000 b1=203.032 units=MI

New linecode.lc47 nphases=1 r1=0.646 x1=0.243 r0=0.646 x0=0.243 b0=135.355 b1=135.355 units=MI

New linecode.lc48 nphases=1 r1=2.733 x1=0.311 r0=2.733 x0=0.311 b0=69.004 b1=69.004 units=MI

New linecode.lc49 nphases=3 r1=0.239 x1=0.364 r0=0.986 x0=0.410 b0=-0.000 b1=122.218 units=MI

New linecode.lc50 nphases=3 r1=0.210 x1=0.200 r0=2.529 x0=0.200 b0=-0.000 b1=288.624 units=MI

New linecode.lc51 nphases=3 r1=1.708 x1=0.311 r0=4.785 x0=0.311 b0=-0.000 b1=103.507 units=MI
