! Define storage transformer
new Transformer.storagexfmr phases=3 windings=2
!~ wdg=1 Bus=NODE_31208075.1.2.3 conn=wye kV=12.47 kva=5000
~ wdg=1 Bus=DEV_262877.1.2.3 conn=wye kV=12.47 kva=5000
~ wdg=2 Bus=storagebus conn=wye kV=0.48 kva=6000

! Define storage unit at 591_57349.1.2.3
New Storage.ESSM34 phases=3 Bus1=storagebus kV=0.48
~ kWRated=250 kVA=250 kWhRated=2000 kWhStored=1000  !assume ess starting with depleted status

! Confirm the efficiency and the aux power
~ %IdlingkW=12 basefreq=60  !TimeChargeTrig=-1 !overestimate aux power
~ %EffCharge=78 %EffDischarge=78 ! 0.82(batter)*0.95(inv)=0.78
~ State=IDLING
! ~ ChargeTrigger=0.7 DischargeTrigger=0.9
! ~ %discharge=45 %charge=45
~ %reserve=0

! Define pv system unit at 591_57349.1.2.3
! This pv system is used to easily implement VoltVAR function for storage
!New PVSystem.PV_ESSM34.1.2.3 phases=3 bus1=storagebus kV=0.48 kVA=500 irrad=1 Pmpp=0
New PVSystem.PV_ESSM34a phases=1 bus1=storagebus.1 kV=0.27713 kVA=166.67 irrad=1 Pmpp=0 kvar=0 %cutin=0.1 %cutout=0.1 yearly=m3pvmult
New PVSystem.PV_ESSM34b phases=1 bus1=storagebus.2 kV=0.27713 kVA=166.67 irrad=1 Pmpp=0 kvar=0 %cutin=0.1 %cutout=0.1 yearly=m3pvmult
New PVSystem.PV_ESSM34c phases=1 bus1=storagebus.3 kV=0.27713 kVA=166.67 irrad=1 Pmpp=0 kvar=0 %cutin=0.1 %cutout=0.1 yearly=m3pvmult
