! Script for MeterC591.dss

! METER DEFINITIONS
New EnergyMeter.m_591_12661_UG line.591_12661_UG
New EnergyMeter.m_591_1703826_BR line.591_1703826_BR
!New EnergyMeter.m_591_1703825_BR line.591_1703825_BR
!New EnergyMeter.m_591_1703828_BR line.591_1703828_BR
!New EnergyMeter.m_591_1703827_BR line.591_1703827_BR
!New EnergyMeter.m_591_3221799_MC line.591_3221799_MC
!New EnergyMeter.m_591_21386_2_OH line.591_21386_2_OH
!New EnergyMeter.m_591_696808_MC line.591_696808_MC
